# 1. Исходные данные
# Ход толкателя
h := 0.01  # м
# Допускаемый угол давления
θ_m := 30 deg  # рад
# Рабочий угол
f_r := 330 deg  # с^-1
# Отношение между величинами
# ускорений толкателя
ν := 2
# 1. Кинематические диаграммы
a_1 := 80
a2 := 1
f_1 := 1
Given
